! ===========================================================
! PINNFlow v6 — ANSYS Verification Script
! Generated for Design ID: 25795
! ===========================================================
/PREP7
FINISH
/CLEAR,NOSTART
/PREP7

! --- Material Properties (A333 Grade 6 Steel) ---
MP,EX,1,200000        ! Young's Modulus (MPa)
MP,NUXY,1,0.3         ! Poisson's Ratio
MP,ALPX,1,1.2e-5      ! Thermal Expansion

! --- Geometry Parameters ---
RAD_OUT = 250.00
RAD_IN  = 235.00
LENGTH  = 30000.00
PRESS   = 8.00
DELTA_T = 20.00

! --- Modeling ---
ET,1,SOLID185          ! 3D Solid Elements
CYLIND, RAD_IN, RAD_OUT, 0, LENGTH, 0, 360
MSHAPE,0,3D
MSHKEY,1
ESIZE, 10              ! 10mm Global Mesh Size
VMESH,ALL

! --- Boundary Conditions ---
DA, 1, ALL, 0          ! Fix bottom face (Z=0)
DA, 2, ALL, 0          ! Fix top face (Z=L) - Simplified fixed-fixed support

! --- Loading ---
ASEL,S,AREA,,3         ! Select inner surface
SFA,ALL,1,PRES,PRESS   ! Apply internal pressure
TUNIF, 20 + DELTA_T    ! Apply operating temperature delta
ALLSEL,ALL

! --- Solution ---
/SOLU
ANTYPE,0               ! Static Analysis
SOLVE
FINISH

! --- Post-Processing ---
/POST1
SET,LAST
PLNSOL,S,EQV,0,1       ! Plot Von Mises Stress
/SHOW,PNG
/REPLOT
! Export stress results to text for verification parity
*GET,MAX_STRESS,SORT,,MAX
*MSG,INFO,MAX_STRESS
 (f10.4)
FINISH
! ===========================================================
